*Heading
** Job name: MESH16 Model name: Cube_shear
** Generated by: Abaqus/CAE 2023
*Preprint, echo=NO, model=NO, history=NO, contact=NO
**
** PARTS
**
*Part, name=Cube-1
*Node
      1,          -2.,          -2.,   14.1000004
      2,          -2.,          -2.,    4.0999999
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*Element, type=C3D10
   1,  313,  314,  315,  316,  590,  589,  588,  592,  591,  593
   2,  317,  318,  319,  320,  596,  595,  594,  598,  597,  599
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*Node
   3948,           0.,           0.,    4.0999999
*Nset, nset=Cube-1-RefPt_, internal
3948,
*Nset, nset=_PickedSet3, internal, generate
    1,  3947,     1
*Elset, elset=_PickedSet3, internal, generate
    1,  2464,     1
** Section: rigid
*Solid Section, elset=_PickedSet3, material=Rigid
,
*End Part
**
*Part, name=Elastomer
*Node
      1,          10.,          10.,           4.
      2,          10.,          10.,   2.66666675
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*Element, type=C3D8R
  1,  57,  58,  62,  61,   1,   2,   6,   5
  2,  58,  59,  63,  62,   2,   3,   7,   6
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*Nset, nset=_PickedSet2, internal, generate
   1,  784,    1
*Elset, elset=_PickedSet2, internal, generate
   1,  507,    1
** Section: Elastomer-new
*Solid Section, elset=_PickedSet2, material=elastomer-new
,
*End Part
**
**
** ASSEMBLY
**
*Assembly, name=Assembly
**
*Instance, name=Cube-1-1, part=Cube-1
          3.,          -3.,           0.
*End Instance
**
*Instance, name=Elastomer-1, part=Elastomer
*End Instance
**
*Nset, nset="Contact Surface", instance=Elastomer-1, generate
   1,  781,    4
*Elset, elset="Contact Surface", instance=Elastomer-1, generate
   1,  505,    3
*Nset, nset="Fixed Surface", instance=Elastomer-1, generate
   4,  784,    4
*Elset, elset="Fixed Surface", instance=Elastomer-1, generate
   3,  507,    3
*Nset, nset="Indenter RP", instance=Cube-1-1
 3948,
*Nset, nset=_PickedSet131, internal, instance=Cube-1-1, generate
    1,  3948,     1
*Elset, elset=_PickedSet131, internal, instance=Cube-1-1, generate
    1,  2464,     1
*Nset, nset=_PickedSet132, internal, instance=Cube-1-1
 3948,
*Nset, nset=_PickedSet133, internal, instance=Cube-1-1
 3948,
*Nset, nset=_PickedSet134, internal, instance=Elastomer-1, generate
   4,  784,    4
*Elset, elset=_PickedSet134, internal, instance=Elastomer-1, generate
   3,  507,    3
*Elset, elset=__PickedSurf129_S3, internal, instance=Cube-1-1
  560,  600,  773,  980,  992, 1033
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*Elset, elset=__PickedSurf129_S1, internal, instance=Cube-1-1
  907, 1373
*Elset, elset=__PickedSurf129_S2, internal, instance=Cube-1-1
 1300, 2091
*Surface, type=ELEMENT, name=_PickedSurf129, internal
__PickedSurf129_S3, S3
__PickedSurf129_S1, S1
__PickedSurf129_S2, S2
*Elset, elset=__PickedSurf130_S6, internal, instance=Elastomer-1, generate
   1,  505,    3
*Surface, type=ELEMENT, name=_PickedSurf130, internal
__PickedSurf130_S6, S6
*Surface, type=NODE, name=_PickedSet131_CNS_, internal
_PickedSet131, 1.
** Constraint: Constraint-1
*Coupling, constraint name=Constraint-1, ref node=_PickedSet132, surface=_PickedSet131_CNS_
*Kinematic
*End Assembly
**
** MATERIALS
**
*Material, name=Rigid
*Density
 0.008,
*Elastic
210., 0.3
*Material, name=elastomer-new
*Density
 0.001,
*Hyperelastic, neo hooke
 0.025, 4.13793
**
** INTERACTION PROPERTIES
**
*Surface Interaction, name=IntProp-1
1.,
*Friction, slip tolerance=0.005
 0.5,
*Surface Behavior, pressure-overclosure=HARD
**
** BOUNDARY CONDITIONS
**
** Name: BC-1 Type: Symmetry/Antisymmetry/Encastre
*Boundary
_PickedSet134, ENCASTRE
**
** INTERACTIONS
**
** Interaction: Int-1
*Contact Pair, interaction=IntProp-1, type=SURFACE TO SURFACE
_PickedSurf130, _PickedSurf129
** ----------------------------------------------------------------
**
** STEP: Step-1
**
*Step, name=Step-1, nlgeom=YES, inc=1000000
*Static
1e-05, 0.6, 5e-08, 0.1
**
** BOUNDARY CONDITIONS
**
** Name: BC-2 Type: Displacement/Rotation
*Boundary
_PickedSet133, 1, 1
_PickedSet133, 2, 2
_PickedSet133, 3, 3, -0.6
_PickedSet133, 4, 4
_PickedSet133, 5, 5
_PickedSet133, 6, 6
**
** CONTROLS
**
*Controls, reset
*Controls, parameters=time incrementation
, , , , , , , 20, , ,
**
** OUTPUT REQUESTS
**
*Restart, write, number interval=1, time marks=NO
*Output, field, frequency=0
*Output, history, frequency=0
*End Step
** ----------------------------------------------------------------
**
** STEP: Step-2
**
*Step, name=Step-2, nlgeom=YES, inc=10000000
*Static
1e-06, 0.5, 1e-09, 0.1
**
** BOUNDARY CONDITIONS
**
** Name: BC-2 Type: Displacement/Rotation
*Boundary
_PickedSet133, 1, 1, 0.4
_PickedSet133, 2, 2, 0.4
_PickedSet133, 3, 3, -0.6
**
** OUTPUT REQUESTS
**
*Restart, write, frequency=0
**
** FIELD OUTPUT: F-Output-1
**
*Output, field, time interval=0.1
*Node Output, nset="Contact Surface"
UT,
*Element Output, elset="Contact Surface", directions=YES
NFORC,
**
** HISTORY OUTPUT: H-Output-2
**
*Output, history, time interval=0.1, time marks=NO
*Node Output, nset="Indenter RP"
RF1, RF2, RF3, RT, UT
*Contact Output, nset="Indenter RP"
CFN1, CFN2, CFN3, CFNM
*End Step
