*Heading
** Job name: MESH09 Model name: Cube_without_shear
** Generated by: Abaqus/CAE 2023
*Preprint, echo=NO, model=NO, history=NO, contact=NO
**
** PARTS
**
*Part, name=Cube-1
*Node
      1,          -2.,          -2.,   52.0999985
      2,          -2.,          -2.,   42.0999985
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*Element, type=C3D4
   1,  577,  578,  579,  580
   2,  577,  581,  578,  580
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*Node
   1257,           0.,           0.,   42.0999985
*Nset, nset=Cube-1-RefPt_, internal
1257,
*Nset, nset=_PickedSet3, internal, generate
    1,  1256,     1
*Elset, elset=_PickedSet3, internal, generate
    1,  5662,     1
** Section: Rigid
*Solid Section, elset=_PickedSet3, material=Rigid
,
*End Part
**
*Part, name=GelTip
*Node
      1,           0.,         -15.,          27.
      2,           0.,           0.,          42.
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*Element, type=C3D8RH
   1,  1352,  1353, 10807, 10794,    31,    32,   859,   858
   2,  1353,  1354, 10808, 10807,    32,    33,   860,   859
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*Nset, nset=_PickedSet2, internal, generate
     1,  15603,      1
*Elset, elset=_PickedSet2, internal, generate
     1,  10296,      1
** Section: Elastomer
*Solid Section, elset=_PickedSet2, material=Elastomer
,
*End Part
**
**
** ASSEMBLY
**
*Assembly, name=Assembly
**
*Instance, name=GelTip-1, part=GelTip
*End Instance
**
*Instance, name=Cube-1-1, part=Cube-1
19.0918830920368,           0., 7.90811690796323
19.0918830920368,           0., 7.90811690796323, 19.0918830920368, -1.0000000139546, 7.90811690796323, 45.0000000171299
*End Instance
**
*Nset, nset="Boundary Condition", instance=GelTip-1
     4,     5,     6,     7,     9,    11
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*Elset, elset="Boundary Condition", instance=GelTip-1
   508,   509,   510,   511,   512,   513
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*Nset, nset="Contact Surface", instance=GelTip-1
    1,    2,    3,    8,   10,   14
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*Elset, elset="Contact Surface", instance=GelTip-1
    1,    2,    3,    4,    5,    6
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*Nset, nset=RP, instance=Cube-1-1
 1257,
*Nset, nset=_PickedSet41, internal, instance=GelTip-1
     4,     5,     6,     7,     9,    11
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*Elset, elset=_PickedSet41, internal, instance=GelTip-1
   508,   509,   510,   511,   512,   513
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*Nset, nset=_PickedSet57, internal, instance=Cube-1-1, generate
    1,  1257,     1
*Elset, elset=_PickedSet57, internal, instance=Cube-1-1, generate
    1,  5662,     1
*Nset, nset=_PickedSet58, internal, instance=Cube-1-1
 1257,
*Nset, nset=_PickedSet59, internal, instance=Cube-1-1
 1257,
*Elset, elset=__PickedSurf35_S2, internal, instance=GelTip-1
    1,    2,    3,    4,    5,    6
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*Elset, elset=__PickedSurf35_S3, internal, instance=GelTip-1
 1522, 1523, 1524, 1525, 1526, 1527
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*Elset, elset=__PickedSurf35_S4, internal, instance=GelTip-1
 1691, 1692, 1693, 1694, 1695, 1696
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*Elset, elset=__PickedSurf35_S1, internal, instance=GelTip-1, generate
 4603,  6162,     1
*Surface, type=ELEMENT, name=_PickedSurf35, internal
__PickedSurf35_S2, S2
__PickedSurf35_S3, S3
__PickedSurf35_S4, S4
__PickedSurf35_S1, S1
*Elset, elset=__PickedSurf56_S3, internal, instance=Cube-1-1
   72,  113,  114,  120,  128,  135
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*Elset, elset=__PickedSurf56_S4, internal, instance=Cube-1-1
  268, 1382, 1744, 1871, 2181, 3015
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*Elset, elset=__PickedSurf56_S1, internal, instance=Cube-1-1
  432,  972, 1996, 2122, 2343, 2717
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*Elset, elset=__PickedSurf56_S2, internal, instance=Cube-1-1
 1620, 1689, 1809, 1881, 1922, 1994
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*Surface, type=ELEMENT, name=_PickedSurf56, internal
__PickedSurf56_S3, S3
__PickedSurf56_S4, S4
__PickedSurf56_S2, S2
__PickedSurf56_S1, S1
*Surface, type=NODE, name=_PickedSet57_CNS_, internal
_PickedSet57, 1.
** Constraint: Constraint-1
*Coupling, constraint name=Constraint-1, ref node=_PickedSet58, surface=_PickedSet57_CNS_
*Kinematic
*End Assembly
**
** MATERIALS
**
*Material, name=Elastomer
*Density
 0.001,
*Hyperelastic, neo hooke
 0.025, 4.13793
*Material, name=Rigid
*Density
 0.008,
*Elastic
210., 0.3
**
** INTERACTION PROPERTIES
**
*Surface Interaction, name=IntProp-1
1.,
*Friction, slip tolerance=0.005
 0.3,
*Surface Behavior, pressure-overclosure=HARD
**
** BOUNDARY CONDITIONS
**
** Name: BC-2 Type: Symmetry/Antisymmetry/Encastre
*Boundary
_PickedSet41, ENCASTRE
**
** INTERACTIONS
**
** Interaction: Int-1
*Contact Pair, interaction=IntProp-1, type=SURFACE TO SURFACE
_PickedSurf35, _PickedSurf56
** ----------------------------------------------------------------
**
** STEP: Step-1
**
*Step, name=Step-1, nlgeom=YES, inc=10000000
*Static
1e-06, 0.9, 1e-10, 0.9
**
** BOUNDARY CONDITIONS
**
** Name: BC-1 Type: Displacement/Rotation
*Boundary
_PickedSet59, 1, 1, -0.7
_PickedSet59, 2, 2
_PickedSet59, 3, 3
_PickedSet59, 4, 4
_PickedSet59, 5, 5
_PickedSet59, 6, 6
**
** OUTPUT REQUESTS
**
*Restart, write, frequency=0
**
** FIELD OUTPUT: F-Output-1
**
*Output, field, time interval=0.025
*Node Output, nset="Contact Surface"
UT,
*Element Output, elset="Contact Surface", directions=YES
NFORC,
**
** HISTORY OUTPUT: H-Output-1
**
*Output, history, time interval=0.025
*Node Output, nset=RP
RF1, RF2, RF3
*Contact Output, nset=RP
CFN1, CFN2, CFN3, CFNM
*End Step
